// SBML level 1 version 2

model mapk_xml()

  // Compartments:
  compartment Cell;

  // Species:
  species L in Cell = 680/Cell;
  species R in Cell = 100/Cell;
  species C in Cell = 0;
  species C2 in Cell = 0;
  species Cstern in Cell = 0;
  species A1 in Cell = 85/Cell;
  species A2 in Cell = 34/Cell;
  species E1 in Cell = 180/Cell;
  species E2 in Cell = 180/Cell;
  species E3 in Cell = 180/Cell;
  species E4 in Cell = 180/Cell;
  species E5 in Cell = 180/Cell;
  species P1 in Cell = 90/Cell;
  species P2 in Cell = 90/Cell;
  species P3 in Cell = 90/Cell;
  species P4 in Cell = 90/Cell;
  species P5 in Cell = 90/Cell;
  species E0stern in Cell = 0;
  species E1stern in Cell = 0;
  species E2stern in Cell = 0;
  species E3stern in Cell = 0;
  species E4stern in Cell = 0;
  species E5stern in Cell = 0;
  species A2minus in Cell = 0;
  species E2minus in Cell = 0;
  species CsternA1 in Cell = 0;
  species A1A2 in Cell = 0;
  species E1E0stern in Cell = 0;
  species E1sternP1 in Cell = 0;
  species E2E1stern in Cell = 0;
  species E2sternP2 in Cell = 0;
  species E3E2stern in Cell = 0;
  species E3sternP3 in Cell = 0;
  species E4E3stern in Cell = 0;
  species E4sternP4 in Cell = 0;
  species E5E4stern in Cell = 0;
  species E5sternP5 in Cell = 0;
  species E0sternE4stern in Cell = 0;
  species E2sternE4stern in Cell = 0;

  // Reactions:
  L+R->C: L + R => C; 0.003 * L * R;
  C->L+R: C => L + R; 0.06 * C;
  C+C->C2: 2 C => C2; 0.01 * C * (C - 1) * 0.5;
  C2->C+C: C2 => 2 C; 0.1 * C2;
  C2->Cstern: C2 => Cstern; 1 * C2;
  Cstern->C2: Cstern => C2; 0.01 * Cstern;
  Cstern+A1->CsternA1: Cstern + A1 => CsternA1; 0.003 * Cstern * A1;
  CsternA1->Cstern+A1: CsternA1 => Cstern + A1; 0.05 * CsternA1;
  CsternA1+A2minus>E0stern: CsternA1 + A2 => E0stern; 0.01 * CsternA1 * A2;
  E0stern->CsternA1+A2: E0stern => CsternA1 + A2; 0.06 * E0stern;
  A1+A2minus>A1A2: A1 + A2 => A1A2; 0.0001 * A1 * A2;
  A1A2minus>A1+A2: A1A2 => A1 + A2; 0.0015 * A1A2;
  Cstern+A1A2minus>E0stern: Cstern + A1A2 => E0stern; 0.0045 * Cstern * A1A2;
  E0stern->Cstern+A1A2: E0stern => Cstern + A1A2; 0.03 * E0stern;
  E1+E0stern->E1E0stern: E1 + E0stern => E1E0stern; 0.01 * E1 * E0stern;
  E1E0stern->E1+E0stern: E1E0stern => E1 + E0stern; 0.5 * E1E0stern;
  E1E0stern->E0stern+E1stern: E1E0stern => E0stern + E1stern; 0.1 * E1E0stern;
  E1stern+P1->E1sternP1: E1stern + P1 => E1sternP1; 0.01 * E1stern * P1;
  E1sternP1->E1stern+P1: E1sternP1 => E1stern + P1; 0.5 * E1sternP1;
  E1sternP1->P1+E1: E1sternP1 => P1 + E1; 0.1 * E1sternP1;
  E2+E1stern->E2E1stern: E2 + E1stern => E2E1stern; 0.01 * E2 * E1stern;
  E2E1stern->E2+E1stern: E2E1stern => E2 + E1stern; 0.5 * E2E1stern;
  E2E1stern->E1stern+E2stern: E2E1stern => E1stern + E2stern; 0.1 * E2E1stern;
  E2stern+P2->E2sternP2: E2stern + P2 => E2sternP2; 0.01 * E2stern * P2;
  E2sternP2->E2stern+P2: E2sternP2 => E2stern + P2; 0.5 * E2sternP2;
  E2sternP2->P2+E2: E2sternP2 => P2 + E2; 0.1 * E2sternP2;
  E3+E2stern->E3E2stern: E3 + E2stern => E3E2stern; 0.01 * E3 * E2stern;
  E3E2stern->E3+E2stern: E3E2stern => E3 + E2stern; 0.5 * E3E2stern;
  E3E2stern->E2stern+E3stern: E3E2stern => E2stern + E3stern; 0.1 * E3E2stern;
  E3stern+P3->E3sternP3: E3stern + P3 => E3sternP3; 0.01 * E3stern * P3;
  E3sternP3->E3stern+P3: E3sternP3 => E3stern + P3; 0.5 * E3sternP3;
  E3sternP3->P3+E3: E3sternP3 => P3 + E3; 0.1 * E3sternP3;
  E4+E3stern->E4E3stern: E4 + E3stern => E4E3stern; 0.01 * E4 * E3stern;
  E4E3stern->E4+E3stern: E4E3stern => E4 + E3stern; 0.5 * E4E3stern;
  E4E3stern->E3stern+E4stern: E4E3stern => E3stern + E4stern; 0.1 * E4E3stern;
  E4stern+P4->E4sternP4: E4stern + P4 => E4sternP4; 0.01 * E4stern * P4;
  E4sternP4->E4stern+P4: E4sternP4 => E4stern + P4; 0.5 * E4sternP4;
  E4sternP4->P4+E4: E4sternP4 => P4 + E4; 0.1 * E4sternP4;
  E5+E4stern->E5E4stern: E5 + E4stern => E5E4stern; 0.01 * E5 * E4stern;
  E5E4stern->E5+E4stern: E5E4stern => E5 + E4stern; 0.5 * E5E4stern;
  E5E4stern->E4stern+E5stern: E5E4stern => E4stern + E5stern; 0.1 * E5E4stern;
  E5stern+P5->E5sternP5: E5stern + P5 => E5sternP5; 0.01 * E5stern * P5;
  E5sternP5->E5stern+P5: E5sternP5 => E5stern + P5; 0.5 * E5sternP5;
  E5sternP5->P5+E5: E5sternP5 => P5 + E5; 0.1 * E5sternP5;
  E0stern+E4stern->E0sternE4stern: E0stern + E4stern => E0sternE4stern; 0.01 * E0stern * E4stern;
  E0sternE4stern->E0stern+E4stern: E0sternE4stern => E0stern + E4stern; 0.5 * E0sternE4stern;
  E0sternE4stern->E4stern+CsternA1+A2minus: E0sternE4stern => E4stern + CsternA1 + A2minus; 0.1 * E0sternE4stern;
  E2stern+E4stern->E2sternE4stern: E2stern + E4stern => E2sternE4stern; 0.01 * E2stern * E4stern;
  E2sternE4stern->E2stern+E4stern: E2sternE4stern => E2stern + E4stern; 0.5 * E2sternE4stern;
  E2sternE4stern->E4stern+E2minus: E2sternE4stern => E4stern + E2minus; 0.1 * E2sternE4stern;

  // Unit definitions:
  unit substance = item;
end
