// SBML level 2 version 3

model lacy.xml()

  // Compartments:
  compartment Cell;

  // Species:
  substanceOnly species PLac in Cell = 1;
  substanceOnly species RNAP in Cell = 3;
  substanceOnly species PLacRNAP in Cell = 0;
  substanceOnly species TrLacZ1 in Cell = 0;
  substanceOnly species RbsLacZ in Cell = 0;
  substanceOnly species TrLacZ2 in Cell = 0;
  substanceOnly species TrLacY1 in Cell = 0;
  substanceOnly species RbsLacY in Cell = 0;
  substanceOnly species TrLacY2 in Cell = 0;
  substanceOnly species Ribosome in Cell = 30;
  substanceOnly species RbsRibosomeLacZ in Cell = 0;
  substanceOnly species RbsRibosomeLacY in Cell = 0;
  substanceOnly species TrRbsLacZ in Cell = 0;
  substanceOnly species TrRbsLacY in Cell = 0;
  substanceOnly species LacZ in Cell = 0;
  substanceOnly species LacY in Cell = 0;
  substanceOnly species dgrLacZ in Cell = 0;
  substanceOnly species dgrLacY in Cell = 0;
  substanceOnly species dgrRbsLacZ in Cell = 0;
  substanceOnly species dgrRbsLacY in Cell = 0;
  substanceOnly species lactose in Cell = 0;
  substanceOnly species LacZlactose in Cell = 0;
  substanceOnly species product in Cell = 0;

  // Reactions:
  PLac+RNAP->PLacRNAP: PLac + RNAP => PLacRNAP; 0.17*PLac*RNAP;
  PLacRNAP->PLac+RNAP: PLacRNAP => PLac + RNAP; 10*PLacRNAP;
  PLacRNAP->TrLacZ1: PLacRNAP => TrLacZ1; 1*PLacRNAP;
  TrLacZ1->RbsLacZ+PLac+TrLacZ2: TrLacZ1 => RbsLacZ + PLac + TrLacZ2; 1*TrLacZ1;
  TrLacZ2->TrLacY1: TrLacZ2 => TrLacY1; 0.015*TrLacZ2;
  TrLacY1->RbsLacY+TrLacY2: TrLacY1 => RbsLacY + TrLacY2; 1*TrLacY1;
  TrLacY2->RNAP: TrLacY2 => RNAP; 0.36*TrLacY2;
  Ribosome+RbsLacZ->RbsRibosomeLacZ: Ribosome + RbsLacZ => RbsRibosomeLacZ; 0.17*Ribosome*RbsLacZ;
  Ribosome+RbsLacY->RbsRibosomeLacY: Ribosome + RbsLacY => RbsRibosomeLacY; 0.17*Ribosome*RbsLacY;
  RbsRibosomeLacZ->Ribosome+RbsLacZ: RbsRibosomeLacZ => Ribosome + RbsLacZ; 0.45*RbsRibosomeLacZ;
  RbsRibosomeLacY->Ribosome+RbsLacY: RbsRibosomeLacY => Ribosome + RbsLacY; 0.45*RbsRibosomeLacY;
  RbsRibosomeLacZ->TrRbsLacZ+RbsLacZ: RbsRibosomeLacZ => TrRbsLacZ + RbsLacZ; 0.4*RbsRibosomeLacZ;
  RbsRibosomeLacY->TrRbsLacY+RbsLacY: RbsRibosomeLacY => TrRbsLacY + RbsLacY; 0.4*RbsRibosomeLacY;
  TrRbsLacZ->LacZ: TrRbsLacZ => LacZ; 0.015*TrRbsLacZ;
  TrRbsLacY->LacY: TrRbsLacY => LacY; 0.036*TrRbsLacY;
  LacZ->dgrLacZ: LacZ => dgrLacZ; 6.42e-5*LacZ;
  LacY->dgrLacY: LacY => dgrLacY; 6.42e-5*LacY;
  RbsLacZ->dgrRbsLacZ: RbsLacZ => dgrRbsLacZ; 0.3*RbsLacZ;
  RbsLacY->dgrRbsLacY: RbsLacY => dgrRbsLacY; 0.3*RbsLacY;
  LacZ+lactose->product+LacZ: LacZ + lactose => product + LacZ; 0.0005731*LacZ*lactose;
  LacY->lactose+LacY: LacY => lactose + LacY; 14*LacY;
end
