// SBML level 2 version 3

model lacz.xml()

  // Compartments:
  compartment Cell;

  // Species:
  substanceOnly species PLac in Cell = 1;
  substanceOnly species RNAP in Cell = 0;
  substanceOnly species PLacRNAP in Cell = 0;
  substanceOnly species TrLacZ1 in Cell = 0;
  substanceOnly species RbsLacZ in Cell = 0;
  substanceOnly species TrLacZ2 in Cell = 0;
  substanceOnly species Ribosome in Cell = 0;
  substanceOnly species RbsRibosome in Cell = 0;
  substanceOnly species TrRbsLacZ in Cell = 0;
  substanceOnly species LacZ in Cell = 0;
  substanceOnly species dgrLacZ in Cell = 0;
  substanceOnly species dgrRbsLacZ in Cell = 0;

  // Reactions:
  PLac+RNAP->PLacRNAP: PLac + RNAP => PLacRNAP; 0.17*PLac*RNAP;
  PLacRNAP->PLac+RNAP: PLacRNAP => PLac + RNAP; 10*PLacRNAP;
  PLacRNAP->TrLacZ1: PLacRNAP => TrLacZ1; 1*PLacRNAP;
  TrLacZ1->RbsLacZ+PLac+TrLacZ2: TrLacZ1 => RbsLacZ + PLac + TrLacZ2; 1*TrLacZ1;
  TrLacZ2->RNAP: TrLacZ2 => RNAP; 0.015*TrLacZ2;
  Ribosome+RbsLacZ->RbsRibosome: Ribosome + RbsLacZ => RbsRibosome; 0.17*Ribosome*RbsLacZ;
  RbsRibosome->Ribosome+RbsLacZ: RbsRibosome => Ribosome + RbsLacZ; 0.45*RbsRibosome;
  RbsRibosome->TrRbsLacZ+RbsLacZ: RbsRibosome => TrRbsLacZ + RbsLacZ; 0.4*RbsRibosome;
  TrRbsLacZ->LacZ: TrRbsLacZ => LacZ; 0.015*TrRbsLacZ;
  LacZ->dgrLacZ: LacZ => dgrLacZ; 6.42e-5*LacZ;
  RbsLacZ->dgrRbsLacZ: RbsLacZ => dgrRbsLacZ; 0.3*RbsLacZ;
end
