// SBML level 2 version 3

model mapk.xml()

  // Compartments:
  compartment Cell;

  // Species:
  substanceOnly species L in Cell = 680;
  substanceOnly species R in Cell = 100;
  substanceOnly species C in Cell = 0;
  substanceOnly species C2 in Cell = 0;
  substanceOnly species C* in Cell = 0;
  substanceOnly species A1 in Cell = 85;
  substanceOnly species A2 in Cell = 34;
  substanceOnly species E1 in Cell = 180;
  substanceOnly species E2 in Cell = 180;
  substanceOnly species E3 in Cell = 180;
  substanceOnly species E4 in Cell = 180;
  substanceOnly species E5 in Cell = 180;
  substanceOnly species P1 in Cell = 90;
  substanceOnly species P2 in Cell = 90;
  substanceOnly species P3 in Cell = 90;
  substanceOnly species P4 in Cell = 90;
  substanceOnly species P5 in Cell = 90;
  substanceOnly species E0* in Cell = 0;
  substanceOnly species E1* in Cell = 0;
  substanceOnly species E2* in Cell = 0;
  substanceOnly species E3* in Cell = 0;
  substanceOnly species E4* in Cell = 0;
  substanceOnly species E5* in Cell = 0;
  substanceOnly species A2- in Cell = 0;
  substanceOnly species E2- in Cell = 0;
  substanceOnly species C*A1 in Cell = 0;
  substanceOnly species A1A2 in Cell = 0;
  substanceOnly species E1E0* in Cell = 0;
  substanceOnly species E1*P1 in Cell = 0;
  substanceOnly species E2E1* in Cell = 0;
  substanceOnly species E2*P2 in Cell = 0;
  substanceOnly species E3E2* in Cell = 0;
  substanceOnly species E3*P3 in Cell = 0;
  substanceOnly species E4E3* in Cell = 0;
  substanceOnly species E4*P4 in Cell = 0;
  substanceOnly species E5E4* in Cell = 0;
  substanceOnly species E5*P5 in Cell = 0;
  substanceOnly species E0*E4* in Cell = 0;
  substanceOnly species E2*E4* in Cell = 0;

  // Reactions:
  L+R->C: L + R => C; 0.003*L*R;
  C->L+R: C => L + R; 0.06*C;
  C+C->C2: C + C => C2; 0.01*C*(C - 1)*0.5;
  C2->C+C: C2 => C + C; 0.1*C2;
  C2->C*: C2 => C*; 1*C2;
  C*->C2: C* => C2; 0.01*C*;
  C*+A1->C*A1: C* + A1 => C*A1; 0.003*C**A1;
  C*A1->C*+A1: C*A1 => C* + A1; 0.05*C*A1;
  C*A1+A2->E0*: C*A1 + A2 => E0*; 0.01*C*A1*A2;
  E0*->C*A1+A2: E0* => C*A1 + A2; 0.06*E0*;
  A1+A2->A1A2: A1 + A2 => A1A2; 0.0001*A1*A2;
  A1A2->A1+A2: A1A2 => A1 + A2; 0.0015*A1A2;
  C*+A1A2->E0*: C* + A1A2 => E0*; 0.0045*C**A1A2;
  E0*->C*+A1A2: E0* => C* + A1A2; 0.03*E0*;
  E1+E0*->E1E0*: E1 + E0* => E1E0*; 0.01*E1*E0*;
  E1E0*->E1+E0*: E1E0* => E1 + E0*; 0.5*E1E0*;
  E1E0*->E0*+E1*: E1E0* => E0* + E1*; 0.1*E1E0*;
  E1*+P1->E1*P1: E1* + P1 => E1*P1; 0.01*E1**P1;
  E1*P1->E1*+P1: E1*P1 => E1* + P1; 0.5*E1*P1;
  E1*P1->P1+E1: E1*P1 => P1 + E1; 0.1*E1*P1;
  E2+E1*->E2E1*: E2 + E1* => E2E1*; 0.01*E2*E1*;
  E2E1*->E2+E1*: E2E1* => E2 + E1*; 0.5*E2E1*;
  E2E1*->E1*+E2*: E2E1* => E1* + E2*; 0.1*E2E1*;
  E2*+P2->E2*P2: E2* + P2 => E2*P2; 0.01*E2**P2;
  E2*P2->E2*+P2: E2*P2 => E2* + P2; 0.5*E2*P2;
  E2*P2->P2+E2: E2*P2 => P2 + E2; 0.1*E2*P2;
  E3+E2*->E3E2*: E3 + E2* => E3E2*; 0.01*E3*E2*;
  E3E2*->E3+E2*: E3E2* => E3 + E2*; 0.5*E3E2*;
  E3E2*->E2*+E3*: E3E2* => E2* + E3*; 0.1*E3E2*;
  E3*+P3->E3*P3: E3* + P3 => E3*P3; 0.01*E3**P3;
  E3*P3->E3*+P3: E3*P3 => E3* + P3; 0.5*E3*P3;
  E3*P3->P3+E3: E3*P3 => P3 + E3; 0.1*E3*P3;
  E4+E3*->E4E3*: E4 + E3* => E4E3*; 0.01*E4*E3*;
  E4E3*->E4+E3*: E4E3* => E4 + E3*; 0.5*E4E3*;
  E4E3*->E3*+E4*: E4E3* => E3* + E4*; 0.1*E4E3*;
  E4*+P4->E4*P4: E4* + P4 => E4*P4; 0.01*E4**P4;
  E4*P4->E4*+P4: E4*P4 => E4* + P4; 0.5*E4*P4;
  E4*P4->P4+E4: E4*P4 => P4 + E4; 0.1*E4*P4;
  E5+E4*->E5E4*: E5 + E4* => E5E4*; 0.01*E5*E4*;
  E5E4*->E5+E4*: E5E4* => E5 + E4*; 0.5*E5E4*;
  E5E4*->E4*+E5*: E5E4* => E4* + E5*; 0.1*E5E4*;
  E5*+P5->E5*P5: E5* + P5 => E5*P5; 0.01*E5**P5;
  E5*P5->E5*+P5: E5*P5 => E5* + P5; 0.5*E5*P5;
  E5*P5->P5+E5: E5*P5 => P5 + E5; 0.1*E5*P5;
  E0*+E4*->E0*E4*: E0* + E4* => E0*E4*; 0.01*E0**E4*;
  E0*E4*->E0*+E4*: E0*E4* => E0* + E4*; 0.5*E0*E4*;
  E0*E4*->E4*+C*A1+A2-: E0*E4* => E4* + C*A1 + A2-; 0.1*E0*E4*;
  E2*+E4*->E2*E4*: E2* + E4* => E2*E4*; 0.01*E2**E4*;
  E2*E4*->E2*+E4*: E2*E4* => E2* + E4*; 0.5*E2*E4*;
  E2*E4*->E4*+E2-: E2*E4* => E4* + E2-; 0.1*E2*E4*;
end
